clear

units metal
dimension 3
boundary p p p
atom_style atomic

read_data Ti_minimized.data

pair_style eam/fs
pair_coeff * * Ti1.eam.fs Ti

neighbor 2.0 bin
neigh_modify delay 0 every 1 check yes

velocity all create 300 49989 mom yes rot no dist gaussian

reset_timestep 0

timestep 0.001

fix NVT all nvt temp 300.0 300.0 0.1

thermo 1000
thermo_style custom step temp pe ke etotal press vol lx ly lz

run 50000

write_restart nvt_300k.restart
write_data nvt_300k.data
write_dump  all custom nvt_300k.lammpstrj id type x y z
